# Лабораторная работа 4 "Интерполяция". Гордеев Никита, группа 22307, вариант 7
# ДАНО:
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f(x) := cos(2*x) - x^2  # Функция
a := 0.5
b := 2.4  # Промежуток
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points := 137
n := [5; 10; 15; 20; 25; 30; 40; 50; 60; 70]  # Значения числа узлов интерполяции
j := 0 .. points  # Набор точек, для вычисления погрешности интерполяции
t[j] := a + (b - a)/points
ORGIN := 0
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# ЭТАП 1 ИНТЕРПОЛЯЦИЯ МНОГОЧЛЕНОМ ЛАГРАНЖА С РАВНООТСТОЯЩИМИ УЗЛАМИ
N := n[0]
i := 0 .. N
x[i] := a + (b - a)/N*i
L(t) := sum(f(x[k])*product(if(k - i, (t - x[i])/(x[k] - x[i]), 1), i = 0 .. N), k = 0 .. N)  # Формула многочлена Лагранжа с равноотстоящими узлами
# [plot: f(ff) - L(ff) vs ff]
# [plot: L(uu), f(uu) vs uu]
# вычисление погрешности интерполяции многочленом Лагранжа для различного количества узлов
r :=
    for m ∈ 0 .. 8
        N ← n[m]
        for i ∈ 0 .. N
            x[i] ← a + (b - a)/N*i
        L(t) ← sum(f(x[k])*product(if(k - i, (t - x[i])/(x[k] - x[i]), 1), i = 0 .. N), k = 0 .. N)
        for j ∈ 0 .. points
            t[j] ← a + (b - a)/points*j
            s[j] ← |f(t[j]) - L(t[j])|
        r[m] ← max(s)
    r
r = [0.00404409; 8.9328e-8; 1.66445e-12; 3.98259e-12; 3.7427e-11; 4.6858e-9; 1.06917e-6; 0.00088336; 0.595319]
# ЭТАП 2 ИНТЕРПОЛЯЦИЯ МНОГОЧЛЕНОМ ЛАГРАНЖА С УЗЛАМИ ЧЕБЫШЕВА
N := n[0]
i := 0 .. N
v[i] := cos(π*(1 + 2*i)/(2*(N + 1)))
z[i] := (a + b)/2 + ((b - a)/2)*v[i]
LCH(t) := sum(f(z[k])*product(if(k - i, (t - z[i])/(z[k] - z[i]), 1), i = 0 .. N), k = 0 .. N)
# [plot: f(uu), LCH(uu) vs uu]
# [plot: f(uu) - LCH(uu) vs uu]
# Вычисление погрешности интерполяции
rch :=
    for m ∈ 0 .. 8
        N ← n[m]
        for i ∈ 0 .. N
            v[i] ← cos(π*(1 + 2*i)/(2*(N + 1)))
            z[i] ← (a + b)/2 + (b - a)/2*v[i]
        LCH(t) ← sum(f(z[k])*product(if(k - i, (t - z[i])/(z[k] - z[i]), 1), i = 0 .. N), k = 0 .. N)
        for j ∈ 0 .. points
            t[j] ← a + (b - a)/137*j
            s[j] ← |f(t[j]) - LCH(t[j])|
        r[m] ← max(s)
    r
rch = [0.00182966; 1.03158e-8; 4.26326e-14; 4.44089e-15; 5.32907e-15; 5.32907e-15; 6.21725e-15; 1.15463e-14; 9.76996e-15]
# ЭТАП 3 ГРАФИЧЕСКОЕ СРАВНЕНИЕ ПОГРЕШНОСТИ
m := 0 .. 8
# [plot: rch[m], r[m] vs n[m]]
# ЭТАП 4: ИНТЕРПОЛЯЦИЯ ЛИНЕЙНЫМ СПЛАЙНОМ
N := n[0]
i := 0 .. N
xx[i] := a + (b - a)*i/N
y[i] := f(xx[i])
LS(t) := linterp(xx, y, t)  # используем функцию linterp
# [plot: f(uu) - LS(uu) vs uu]
# Вычисление погрешности интерполяции
rls :=
    for m ∈ 0 .. 8
        N ← n[m]
        for i ∈ 0 .. N
            xx[i] ← a + (b - a)*i/N
            y[i] ← f(xx[i])
        LS(t) ← linterp(xx, y, t)
        for j ∈ 0 .. points
            t[j] ← a + (b - a)/points*j
            s[j] ← |f(t[j]) - LS(t[j])|
        r[m] ← max(s)
    r
rls = [0.0499524; 0.0156826; 0.00737593; 0.00427058; 0.00278331; 0.00195115; 0.00109341; 0.000676583; 0.000500812]
# ЭТАП 5: ФОРМУЛИРОВАНИЕ ВЫВОДОВ
# Интерполяция многочленом Лагранжа:
# - Равноотстоящие узлы:
# - Погрешность уменьшается с увеличением числа узлов, но возможен эффект Рунге*.
# - Узлы Чебышева:
# - Использование корней Чебышева позволяет избежать эффекта Рунге.
# - Погрешность уменьшается с увеличением числа узлов.
# Линейный сплайн:
# - Линейный сплайн обеспечивает гладкую интерполяцию, особенно при малом числе узлов
# - Возможно, линейный сплайн эффективнее в сравнении с многочленом Лагранжа при ограниченном числе узлов.
# Общие выводы:
# - Выбор метода зависит от требований задачи.
# - Интерполяция многочленом Лагранжа с узлами Чебышева может быть точной.
# - Линейный сплайн - простой и гибкий метод интерполяции для гладких функций.
# * Эффект Рунге — это явление в численных методах решения дифференциальных уравнений, при котором увеличение числа шагов (уменьшение размера шага) сначала улучшает точность решения, но после определенного момента приводит к ухудшению из-за численных ошибок, таких как ошибки округления.
